*Heading
** Job name: GHOSH_TEST_SCALE Model name: Model-1
** Generated by: Abaqus/CAE 2017
*Preprint, echo=NO, model=NO, history=NO, contact=NO
**
** PARTS
**
*Part, name=Part-1
*Node
      1,           3.,          2.5,          2.5
      2,           3.,           3.,          2.5
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*Element, type=C3D8
 1,   83,  705, 2717,  697,    1,   65,  689,   72
 2,  705,  706, 2718, 2717,   65,   66,  690,  689
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*Nset, nset=Set-1
    5,   13,   23,   24,   27,   41
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*Elset, elset=Set-1, generate
 1693,  2692,     1
*Nset, nset=Set-2
    1,    2,    3,    4,    5,    6
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*Elset, elset=Set-2
    1,    2,    3,    4,    5,    6
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*Nset, nset=Set-3
    5,   13,   23,   24,   27,   41
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*Elset, elset=Set-3, generate
 1693,  2692,     1
*Nset, nset=Set-4
    1,    2,    3,    4,    5,    6
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*Elset, elset=Set-4
    1,    2,    3,    4,    5,    6
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** Section: Section-2
*Solid Section, elset=Set-4, material=Material-2
,
** Section: Section-1
*Solid Section, elset=Set-3, material=Material-1
,
*End Part
**
**
** ASSEMBLY
**
*Assembly, name=Assembly
**
*Instance, name=Part-1-1, part=Part-1
*End Instance
**
*Nset, nset=Set-2, instance=Part-1-1
    9,   10,   11,   12,   31,   32
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*Elset, elset=Set-2, instance=Part-1-1
   28,   29,   30,   31,   32,   33
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*Nset, nset=Set-3, instance=Part-1-1
    9,   12,   15,   16,   17,   18
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*Elset, elset=Set-3, instance=Part-1-1
   28,   31,   34,   37,   40,   43
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*Nset, nset=Set-4, instance=Part-1-1
   38,   39,   42,   43,   46,   47
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*Elset, elset=Set-4, instance=Part-1-1
  838,  839,  840,  847,  848,  849
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*Nset, nset=TOPFACE, instance=Part-1-1
    2,    3,    6,    7,   18,   19
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*Elset, elset=TOPFACE, instance=Part-1-1
    3,    6,    9,   12,   15,   18
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*End Assembly
*Amplitude, name=Amp-1, time=TOTAL TIME
             0.,              0.,             10.,              1.
**
** MATERIALS
**
*Material, name=Material-1
*Density
 1e-21,
*Depvar
    650,
*User Material, constants=79
1.,       0.,       0.,       0.,       1.,       0.,       0.,       0.
       1.,  0.00501,  0.00501,  0.00501,  0.00501,  0.00501,  0.00501,  0.00501
  0.00501,  0.00501,  0.00501,  0.00501,  0.00501,  0.00501,  0.00501,  0.00501
  0.00501,  0.00501,  0.00501,  296000.,  296000.,  296000.,  127000.,  127000.
  127000.,  199000.,  199000.,       0.,       0.,       0.,  199000.,       0.
       0.,       0.,       0.,       0.,       0.,       0.,       0.,       0.
       0.,   0.0528,     126.,     6.68,     7.79,    0.003, 1.56e-07,   0.0151
     1.56,     330., 1.56e-07,      0.3,      0.5,      0.2,    -3.04,   0.0165
    5000., 4.14e-09,   0.0702,      0.5, 0.000249,     4.02,     1.98,      10.
       0.,      0.3,       1.,  296000.,  199000.,  127000.,  0.00501
*Material, name=Material-1S
*Density
 1e-21,
*Depvar
    650,
*User Material, constants=79
1.,       0.,       0.,       0.,       1.,       0.,       0.,       0.
       1., 5.01e+09, 5.01e+09, 5.01e+09, 5.01e+09, 5.01e+09, 5.01e+09, 5.01e+09
 5.01e+09, 5.01e+09, 5.01e+09, 5.01e+09, 5.01e+09, 5.01e+09, 5.01e+09, 5.01e+09
 5.01e+09, 5.01e+09, 5.01e+09, 2.96e+11, 2.96e+11, 2.96e+11, 1.27e+11, 1.27e+11
 1.27e+11, 1.99e+11, 1.99e+11,       0.,       0.,       0., 1.99e+11,       0.
       0.,       0.,       0.,       0.,       0.,       0.,       0.,       0.
       0.,   0.0528,     126.,     6.68, 7.79e+06,    3e-09, 1.56e-19, 1.51e-08
     1.56,  3.3e+08, 1.56e-19,      0.3,      0.5,      0.2,    -3.04,   0.0165
    5e+15, 4.14e-21,   0.0702,      0.5, 2.49e-10, 4.02e+06, 1.98e+06,      10.
       0.,      0.3,       1., 2.96e+11, 1.99e+11, 1.27e+11, 5.01e+09
*Material, name=Material-2
*Density
 1e-21,
*Depvar
    650,
*User Material, constants=79
1.,       0.,       0.,       0.,       1.,       0.,       0.,       0.
       1.,  0.00501,  0.00501,  0.00501,  0.00501,  0.00501,  0.00501,  0.00501
  0.00501,  0.00501,  0.00501,  0.00501,  0.00501,  0.00501,  0.00501,  0.00501
  0.00501,  0.00501,  0.00501,  296000.,  296000.,  296000.,  127000.,  127000.
  127000.,  199000.,  199000.,       0.,       0.,       0.,  199000.,       0.
       0.,       0.,       0.,       0.,       0.,       0.,       0.,       0.
       0.,   0.0528,     126.,     6.68,     7.79,    0.003, 1.56e-07,   0.0151
       0.,       0., 1.56e-07,      0.3,      0.5,      0.2,    -3.04,   0.0165
    5000., 4.14e-09,   0.0702,      0.5, 0.000249,     4.02,     1.98,      10.
       0.,      0.3,       1.,  296000.,  199000.,  127000.,  0.00501
*Material, name=Material-2S
*Density
 1e-21,
*Depvar
    650,
*User Material, constants=79
1.,       0.,       0.,       0.,       1.,       0.,       0.,       0.
       1., 5.01e+09, 5.01e+09, 5.01e+09, 5.01e+09, 5.01e+09, 5.01e+09, 5.01e+09
 5.01e+09, 5.01e+09, 5.01e+09, 5.01e+09, 5.01e+09, 5.01e+09, 5.01e+09, 5.01e+09
 5.01e+09, 5.01e+09, 5.01e+09, 2.96e+11, 2.96e+11, 2.96e+11, 1.27e+11, 1.27e+11
 1.27e+11, 1.99e+11, 1.99e+11,       0.,       0.,       0., 1.99e+11,       0.
       0.,       0.,       0.,       0.,       0.,       0.,       0.,       0.
       0.,   0.0528,     126.,     6.68, 7.79e+06,    3e-09, 1.56e-19, 1.51e-08
       0.,       0., 1.56e-19,      0.3,      0.5,      0.2,    -3.04,   0.0165
    5e+15, 4.14e-21,   0.0702,      0.5, 2.49e-10, 4.02e+06, 1.98e+06,      10.
       0.,      0.3,       1., 2.96e+11, 1.99e+11, 1.27e+11, 5.01e+09
** ----------------------------------------------------------------
**
** STEP: Step-1
**
*Step, name=Step-1, nlgeom=YES, inc=1000000
*Static
0.001, 10., 1e-08, 0.01
**
** BOUNDARY CONDITIONS
**
** Name: BC-1 Type: Symmetry/Antisymmetry/Encastre
*Boundary
Set-2, YSYMM
** Name: BC-2 Type: Symmetry/Antisymmetry/Encastre
*Boundary
Set-3, XSYMM
** Name: BC-3 Type: Symmetry/Antisymmetry/Encastre
*Boundary
Set-4, ZSYMM
** Name: BC-4 Type: Displacement/Rotation
*Boundary, amplitude=Amp-1
TOPFACE, 2, 2, -0.4
**
** OUTPUT REQUESTS
**
*Restart, write, frequency=0
**
** FIELD OUTPUT: F-Output-1
**
*Output, field, number interval=100, time marks=NO
*Node Output
CF, RF, U
*Element Output, directions=YES
LE, PE, PEEQ, PEMAG, S, SDV
*Contact Output
CDISP, CSTRESS
**
** HISTORY OUTPUT: H-Output-1
**
*Output, history, number interval=100, time marks=NO
*Node Output, nset=TOPFACE
RF1, RF2, RF3, U1, U2, U3
*End Step
