*Heading
** Job name: Job-6D Model name: MultiNodeDynamic
** Generated by: Abaqus/CAE 6.14-4
*Preprint, echo=NO, model=NO, history=NO, contact=NO
**
** PARTS
**
*Part, name=Part-1
*Node
      1,           0.,          0.5,           1.
      2,           0.,           0.,           1.
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*Element, type=C3D8
  1,  68, 300, 756, 228,   1,  19, 196,  34
  2, 300, 301, 757, 756,  19,  20, 197, 196
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*Nset, nset=Set-2
    1,    2,    3,    5,    6,    8
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*Elset, elset=Set-2
  251,  252,  253,  254,  255,  256
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*Nset, nset=Set-3
    1,    2,    3,    4,    5,    6
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*Elset, elset=Set-3
   1,   2,   3,   4,   5,   6
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** Section: Section-1
*Solid Section, elset=Set-3, material=Material-1
,
** Section: Section-2
*Solid Section, elset=Set-2, material=Material-2
,
*End Part
**
**
** ASSEMBLY
**
*Assembly, name=Assembly
**
*Instance, name=Part-1-1, part=Part-1
*End Instance
**
*Nset, nset=Set-1, instance=Part-1-1
  13,  14,  15,  16,  17,  18
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*Elset, elset=Set-1, instance=Part-1-1
 501, 502, 503, 504, 505, 506
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*Nset, nset=Set-2, instance=Part-1-1
   9,  10,  11,  12,  15,  16
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*Elset, elset=Set-2, instance=Part-1-1
 251, 256, 261, 266, 271, 276
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*Nset, nset=Set-3, instance=Part-1-1
   5,   6,   7,   8,   9,  10
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*Elset, elset=Set-3, instance=Part-1-1
 226, 227, 228, 229, 230, 231
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*Nset, nset=Set-4, instance=Part-1-1
   1,   4,   7,   8,  17,  18
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*Elset, elset=Set-4, instance=Part-1-1
    1,    6,   11,   16,   21,   26
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*Nset, nset=Set-5, instance=Part-1-1
   9,  10,  11,  12,  15,  16
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*Elset, elset=Set-5, instance=Part-1-1
 251, 256, 261, 266, 271, 276
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*Nset, nset=Set-6, instance=Part-1-1
  13,  14,  15,  16,  17,  18
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*Elset, elset=Set-6, instance=Part-1-1
 501, 502, 503, 504, 505, 506
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*Nset, nset=Set-7, instance=Part-1-1
   5,   6,   7,   8,   9,  10
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*Elset, elset=Set-7, instance=Part-1-1
 226, 227, 228, 229, 230, 231
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*Nset, nset=Set-8, instance=Part-1-1
   1,   4,   7,   8,  17,  18
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*Elset, elset=Set-8, instance=Part-1-1
    1,    6,   11,   16,   21,   26
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*End Assembly
*Amplitude, name=Amp-1, time=TOTAL TIME
             0.,              0.,              1.,            0.15
**
** MATERIALS
**
*Material, name=Material-1
*Density
 1e-12,
*Depvar
    650,
*User Material, constants=79
1.,       0.,       0.,       0.,       1.,       0.,       0.,       0.
       1., 5.01e+09, 5.01e+09, 5.01e+09, 5.01e+09, 5.01e+09, 5.01e+09, 5.01e+09
 5.01e+09, 5.01e+09, 5.01e+09, 5.01e+09, 5.01e+09, 5.01e+09, 5.01e+09, 5.01e+09
 5.01e+09, 5.01e+09, 5.01e+09, 2.96e+11, 2.96e+11, 2.96e+11, 1.27e+11, 1.27e+11
 1.27e+11, 1.99e+11, 1.99e+11,       0.,       0.,       0., 1.99e+11,       0.
       0.,       0.,       0.,       0.,       0.,       0.,       0.,       0.
       0.,   0.0528,     126.,     6.68, 7.79e+06,    3e-09, 1.56e-19, 1.51e-08
     1.56,  3.3e+08, 1.56e-19,      0.3,      0.5,      0.2,    -3.04,   0.0165
    5e+15, 4.14e-21,   0.0702,      0.5, 2.49e-10, 4.02e+06, 1.98e+06,      10.
       0.,      0.3,       1., 2.96e+11, 1.99e+11, 1.27e+11, 5.01e+09
*Material, name=Material-2
*Density
 1e-12,
*Depvar
    650,
*User Material, constants=79
 0.866025,     -0.5,       0.,      0.5, 0.866025,       0.,       0.,       0.
       1., 5.01e+09, 5.01e+09, 5.01e+09, 5.01e+09, 5.01e+09, 5.01e+09, 5.01e+09
 5.01e+09, 5.01e+09, 5.01e+09, 5.01e+09, 5.01e+09, 5.01e+09, 5.01e+09, 5.01e+09
 5.01e+09, 5.01e+09, 5.01e+09, 2.96e+11, 2.96e+11, 2.96e+11, 1.27e+11, 1.27e+11
 1.27e+11, 1.99e+11, 1.99e+11,       0.,       0.,       0., 1.99e+11,       0.
       0.,       0.,       0.,       0.,       0.,       0.,       0.,       0.
       0.,   0.0528,     126.,     6.68, 7.79e+06,    3e-09, 1.56e-19, 1.51e-08
     1.56,  3.3e+08, 1.56e-19,      0.3,      0.5,      0.2,    -3.04,   0.0165
    5e+15, 4.14e-21,   0.0702,      0.5, 2.49e-10, 4.02e+06, 1.98e+06,      10.
       0.,      0.3,       1., 2.96e+11, 1.99e+11, 1.27e+11, 5.01e+09
** ----------------------------------------------------------------
**
** STEP: Step-2
**
*Step, name=Step-2, nlgeom=YES, inc=100000
*Dynamic
1e-06,10.,1e-12,1e-05
**
** BOUNDARY CONDITIONS
**
** Name: BC-5 Type: Symmetry/Antisymmetry/Encastre
*Boundary
Set-5, YSYMM
** Name: BC-6 Type: Symmetry/Antisymmetry/Encastre
*Boundary
Set-6, XSYMM
** Name: BC-7 Type: Symmetry/Antisymmetry/Encastre
*Boundary
Set-7, ZSYMM
** Name: BC-8 Type: Displacement/Rotation
*Boundary, amplitude=Amp-1
Set-8, 2, 2, 1.
**
** OUTPUT REQUESTS
**
*Restart, write, frequency=0
**
** FIELD OUTPUT: F-Output-2
**
*Output, field, number interval=100, time marks=NO
*Element Output, directions=YES
E, LE, MISES, S, SDV
*Output, history, frequency=0
*End Step
