*Heading
** Job name: BigC2M Model name: BigCube
** Generated by: Abaqus/CAE 2017
*Preprint, echo=NO, model=NO, history=NO, contact=NO
**
** PARTS
**
*Part, name=Part-1
*Node
      1,         200.,         200.,         200.
      2,         200.,         180.,         200.
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*Element, type=C3D8
   1,  122,  123,  134,  133,    1,    2,   13,   12
   2,  123,  124,  135,  134,    2,    3,   14,   13
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*Nset, nset=Set-2, generate
    1,  1331,     1
*Elset, elset=Set-2, generate
    1,  1000,     1
*Elset, elset=Set-3
    1,    2,    3,    4,    5,    6
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*Elset, elset=Set-4
 223, 224, 225, 226, 227, 228
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** Section: Section-2
*Solid Section, elset=Set-3, material=Material-2
,
** Section: Section-1
*Solid Section, elset=Set-4, material=Material-1
,
*End Part
**
**
** ASSEMBLY
**
*Assembly, name=Assembly
**
*Instance, name=Part-1-1, part=Part-1
*End Instance
**
*Nset, nset=Set-1, instance=Part-1-1, generate
   11,  1331,    11
*Elset, elset=Set-1, instance=Part-1-1, generate
   10,  1000,    10
*Nset, nset=Set-2, instance=Part-1-1, generate
    1,  1321,    11
*Elset, elset=Set-2, instance=Part-1-1, generate
   1,  991,   10
*Nset, nset=Set-3, instance=Part-1-1, generate
    1,  1321,    11
*Elset, elset=Set-3, instance=Part-1-1, generate
   1,  991,   10
*End Assembly
*Amplitude, name=Amp-1, time=TOTAL TIME
             0.,              0.,             10.,            100.
**
** MATERIALS
**
*Material, name=Material-1
*Density
 1e-21,
*Depvar
    900,
*User Material, constants=79
1.,       0.,       0.,       0.,       1.,       0.,       0.,       0.
       1.,  0.00501,  0.00501,  0.00501,  0.00501,  0.00501,  0.00501,  0.00501
  0.00501,  0.00501,  0.00501,  0.00501,  0.00501,  0.00501,  0.00501,  0.00501
  0.00501,  0.00501,  0.00501,  296000.,  296000.,  296000.,  127000.,  127000.
  127000.,  199000.,  199000.,       0.,       0.,       0.,  199000.,       0.
       0.,       0.,       0.,       0.,       0.,       0.,       0.,       0.
       0.,   0.0528,     126.,     6.68,     7.79,  0.00083, 1.56e-07,  0.00418
     1.56,     330., 1.56e-07,      0.3,      0.5,      0.2,    0.301,   0.0596
    5000., 4.14e-09,   0.0702,      0.5, 0.000249,     4.02,     1.98,      10.
       0.,      0.3,       1.,  296000.,  199000.,  127000.,  0.00501
*Material, name=Material-2
*Density
 1e-21,
*Depvar
    900,
*User Material, constants=79
1.,       0.,       0.,       0.,       1.,       0.,       0.,       0.
       1.,  0.00501,  0.00501,  0.00501,  0.00501,  0.00501,  0.00501,  0.00501
  0.00501,  0.00501,  0.00501,  0.00501,  0.00501,  0.00501,  0.00501,  0.00501
  0.00501,  0.00501,  0.00501,  296000.,  296000.,  296000.,  127000.,  127000.
  127000.,  199000.,  199000.,       0.,       0.,       0.,  199000.,       0.
       0.,       0.,       0.,       0.,       0.,       0.,       0.,       0.
       0.,   0.0528,     126.,     6.68,     7.79,  0.00083, 1.56e-07,  0.00418
       0.,       0., 1.56e-07,      0.3,      0.5,      0.2,    0.301,       0.
       0., 4.14e-09,   0.0702,      0.5, 0.000249,     4.02,     1.98,      10.
       0.,      0.3,       1.,  296000.,  199000.,  127000.,  0.00501
** ----------------------------------------------------------------
**
** STEP: Step-1
**
*Step, name=Step-1, nlgeom=YES, inc=100000
*Static
0.001, 10., 1e-06, 0.1
**
** BOUNDARY CONDITIONS
**
** Name: BC-1 Type: Symmetry/Antisymmetry/Encastre
*Boundary
Set-1, PINNED
** Name: BC-2 Type: Displacement/Rotation
*Boundary, amplitude=Amp-1
Set-2, 1, 1
Set-2, 2, 2, -1.
Set-2, 3, 3
**
** OUTPUT REQUESTS
**
*Restart, write, frequency=0
**
** FIELD OUTPUT: F-Output-1
**
*Output, field
*Node Output
CF, RF, U
*Element Output, directions=YES
LE, PE, PEEQ, PEMAG, S, SDV
*Contact Output
CDISP, CSTRESS
**
** HISTORY OUTPUT: H-Output-1
**
*Output, history
*Node Output, nset=Set-3
RF1, RF2, RF3, U1, U2, U3
*End Step
