*Heading
** Job name: GHOSH_TEST Model name: Model-1
** Generated by: Abaqus/CAE 2017
*Preprint, echo=NO, model=NO, history=NO, contact=NO
** ----------------------------------------------------------------
**
** PART INSTANCE: Part-1-1
**
*Node
      1,           0.,          2.5,          2.5
      2,          0.5,          2.5,          2.5
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*Element, type=C3D8
 1,   86,  513, 1469,  499,    1,   65,  497,   68
 2,  513,   94,  506, 1469,   65,    2,   66,  497
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*Nset, nset=Part-1-1_Set-1
    2,    6,   10,   12,   17,   19
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*Elset, elset=Part-1-1_Set-1, generate
 353,  864,    1
*Nset, nset=Part-1-1_Set-2
    1,    2,    3,    4,    5,    6
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*Elset, elset=Part-1-1_Set-2
    1,    2,    3,    4,    5,    6
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*Nset, nset=Part-1-1_Set-3
    2,    6,   10,   12,   17,   19
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*Elset, elset=Part-1-1_Set-3, generate
 353,  864,    1
*Nset, nset=Part-1-1_Set-4
    1,    2,    3,    4,    5,    6
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*Elset, elset=Part-1-1_Set-4
    1,    2,    3,    4,    5,    6
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** Section: Section-2
*Solid Section, elset=Part-1-1_Set-4, material=Material-2-Cor
,
** Section: Section-1
*Solid Section, elset=Part-1-1_Set-3, material=Material-1-Cor
,
*System
*Nset, nset=Set-2
   13,   14,   15,   16,   18,   20
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*Elset, elset=Set-2
  161,  163,  165,  167,  169,  171
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*Nset, nset=Set-3
    1,    4,    5,    8,    9,   11
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*Elset, elset=Set-3
    1,    3,    5,    7,    9,   11
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*Nset, nset=Set-5
   13,   14,   15,   16,   18,   20
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*Elset, elset=Set-5
  161,  163,  165,  167,  169,  171
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*Nset, nset=Set-6
    1,    4,    5,    8,    9,   11
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*Elset, elset=Set-6
    1,    3,    5,    7,    9,   11
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*Nset, nset=Set-7
   49,   50,   51,   52,   53,   54
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*Elset, elset=Set-7
 1329, 1330, 1331, 1332, 1333, 1334
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*Nset, nset=Set-8
    3,    4,    7,    8,   29,   30
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*Elset, elset=Set-8
    3,    4,    7,    8,   11,   12
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*Nset, nset=TOPFACE
    3,    4,    7,    8,   29,   30
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*Elset, elset=TOPFACE
    3,    4,    7,    8,   11,   12
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*Amplitude, name=Amp-1, time=TOTAL TIME
             0.,              0.,             10.,              1.
**
** MATERIALS
**
*Material, name=Material-1
*Density
 1e-21,
*Depvar
    650,
*User Material, constants=79
1.,       0.,       0.,       0.,       1.,       0.,       0.,       0.
       1.,  0.00501,  0.00501,  0.00501,  0.00501,  0.00501,  0.00501,  0.00501
  0.00501,  0.00501,  0.00501,  0.00501,  0.00501,  0.00501,  0.00501,  0.00501
  0.00501,  0.00501,  0.00501,  296000.,  296000.,  296000.,  127000.,  127000.
  127000.,  199000.,  199000.,       0.,       0.,       0.,  199000.,       0.
       0.,       0.,       0.,       0.,       0.,       0.,       0.,       0.
       0.,   0.0528,     126.,     6.68,     7.79,    0.003, 1.56e-07,   0.0151
     1.56,     330., 1.56e-07,      0.3,      0.5,      0.2,    -3.04,   0.0165
    5000., 4.14e-09,   0.0702,      0.5, 0.000249,     4.02,     1.98,      10.
       0.,      0.3,       1.,  296000.,  199000.,  127000.,  0.00501
*Material, name=Material-1-Cor
*Density
 1e-21,
*Depvar
    650,
*User Material, constants=79
1.,       0.,       0.,       0.,       1.,       0.,       0.,       0.
       1.,  0.00501,  0.00501,  0.00501,  0.00501,  0.00501,  0.00501,  0.00501
  0.00501,  0.00501,  0.00501,  0.00501,  0.00501,  0.00501,  0.00501,  0.00501
  0.00501,  0.00501,  0.00501,  296000.,  296000.,  296000.,  127000.,  127000.
  127000.,  199000.,  199000.,       0.,       0.,       0.,  199000.,       0.
       0.,       0.,       0.,       0.,       0.,       0.,       0.,       0.
       0.,   0.0528,     126.,     6.68,     7.79,  0.00083, 1.56e-07,  0.00418
     1.56,     330., 1.56e-07,      0.3,      0.5,      0.2,    0.301,   0.0596
    5000., 4.14e-09,   0.0702,      0.5, 0.000249,     4.02,     1.98,      10.
       0.,      0.3,       1.,  296000.,  199000.,  127000.,  0.00501
*Material, name=Material-1S
*Density
 1e-21,
*Depvar
    650,
*User Material, constants=79
1.,       0.,       0.,       0.,       1.,       0.,       0.,       0.
       1., 5.01e+09, 5.01e+09, 5.01e+09, 5.01e+09, 5.01e+09, 5.01e+09, 5.01e+09
 5.01e+09, 5.01e+09, 5.01e+09, 5.01e+09, 5.01e+09, 5.01e+09, 5.01e+09, 5.01e+09
 5.01e+09, 5.01e+09, 5.01e+09, 2.96e+11, 2.96e+11, 2.96e+11, 1.27e+11, 1.27e+11
 1.27e+11, 1.99e+11, 1.99e+11,       0.,       0.,       0., 1.99e+11,       0.
       0.,       0.,       0.,       0.,       0.,       0.,       0.,       0.
       0.,   0.0528,     126.,     6.68, 7.79e+06,    3e-09, 1.56e-19, 1.51e-08
     1.56,  3.3e+08, 1.56e-19,      0.3,      0.5,      0.2,    -3.04,   0.0165
    5e+15, 4.14e-21,   0.0702,      0.5, 2.49e-10, 4.02e+06, 1.98e+06,      10.
       0.,      0.3,       1., 2.96e+11, 1.99e+11, 1.27e+11, 5.01e+09
*Material, name=Material-2
*Density
 1e-21,
*Depvar
    650,
*User Material, constants=79
1.,       0.,       0.,       0.,       1.,       0.,       0.,       0.
       1.,  0.00501,  0.00501,  0.00501,  0.00501,  0.00501,  0.00501,  0.00501
  0.00501,  0.00501,  0.00501,  0.00501,  0.00501,  0.00501,  0.00501,  0.00501
  0.00501,  0.00501,  0.00501,  296000.,  296000.,  296000.,  127000.,  127000.
  127000.,  199000.,  199000.,       0.,       0.,       0.,  199000.,       0.
       0.,       0.,       0.,       0.,       0.,       0.,       0.,       0.
       0.,   0.0528,     126.,     6.68,     7.79,    0.003, 1.56e-07,   0.0151
       0.,       0., 1.56e-07,      0.3,      0.5,      0.2,    -3.04,   0.0165
    5000., 4.14e-09,   0.0702,      0.5, 0.000249,     4.02,     1.98,      10.
       0.,      0.3,       1.,  296000.,  199000.,  127000.,  0.00501
*Material, name=Material-2-Cor
*Density
 1e-21,
*Depvar
    650,
*User Material, constants=79
1.,       0.,       0.,       0.,       1.,       0.,       0.,       0.
       1.,  0.00501,  0.00501,  0.00501,  0.00501,  0.00501,  0.00501,  0.00501
  0.00501,  0.00501,  0.00501,  0.00501,  0.00501,  0.00501,  0.00501,  0.00501
  0.00501,  0.00501,  0.00501,  296000.,  296000.,  296000.,  127000.,  127000.
  127000.,  199000.,  199000.,       0.,       0.,       0.,  199000.,       0.
       0.,       0.,       0.,       0.,       0.,       0.,       0.,       0.
       0.,   0.0528,     126.,     6.68,     7.79,  0.00083, 1.56e-07,  0.00418
       0.,       0., 1.56e-07,      0.3,      0.5,      0.2,    0.301,       0.
       0., 4.14e-09,   0.0702,      0.5, 0.000249,     4.02,     1.98,      10.
       0.,      0.3,       1.,  296000.,  199000.,  127000.,  0.00501
*Material, name=Material-2S
*Density
 1e-21,
*Depvar
    650,
*User Material, constants=79
1.,       0.,       0.,       0.,       1.,       0.,       0.,       0.
       1., 5.01e+09, 5.01e+09, 5.01e+09, 5.01e+09, 5.01e+09, 5.01e+09, 5.01e+09
 5.01e+09, 5.01e+09, 5.01e+09, 5.01e+09, 5.01e+09, 5.01e+09, 5.01e+09, 5.01e+09
 5.01e+09, 5.01e+09, 5.01e+09, 2.96e+11, 2.96e+11, 2.96e+11, 1.27e+11, 1.27e+11
 1.27e+11, 1.99e+11, 1.99e+11,       0.,       0.,       0., 1.99e+11,       0.
       0.,       0.,       0.,       0.,       0.,       0.,       0.,       0.
       0.,   0.0528,     126.,     6.68, 7.79e+06,    3e-09, 1.56e-19, 1.51e-08
       0.,       0., 1.56e-19,      0.3,      0.5,      0.2,    -3.04,   0.0165
    5e+15, 4.14e-21,   0.0702,      0.5, 2.49e-10, 4.02e+06, 1.98e+06,      10.
       0.,      0.3,       1., 2.96e+11, 1.99e+11, 1.27e+11, 5.01e+09
**
** CONTACT INITIALIZATION DATA
**
*Contact Initialization Data, name=CInit-1
** ----------------------------------------------------------------
**
** STEP: Step-1
**
*Step, name=Step-1, nlgeom=YES, inc=1000000
*Static
0.001, 10., 1e-08, 0.01
**
** BOUNDARY CONDITIONS
**
** Name: BC-5 Type: Displacement/Rotation
*Boundary
Set-5, 2, 2
** Name: BC-6 Type: Displacement/Rotation
*Boundary
Set-6, 1, 1
** Name: BC-7 Type: Displacement/Rotation
*Boundary
Set-7, 3, 3
** Name: BC-8 Type: Displacement/Rotation
*Boundary, amplitude=Amp-1
Set-8, 2, 2, 0.4
**
** OUTPUT REQUESTS
**
*Restart, write, frequency=0
**
** FIELD OUTPUT: F-Output-1
**
*Output, field, number interval=100, time marks=NO
*Node Output
CF, RF, U
*Element Output, directions=YES
LE, PE, PEEQ, PEMAG, S, SDV
*Contact Output
CDISP, CSTRESS
**
** HISTORY OUTPUT: H-Output-1
**
*Output, history, number interval=100, time marks=NO
*Node Output, nset=TOPFACE
RF1, RF2, RF3, U1, U2, U3
*End Step
