*Heading
** Job name: Cube_R0 Model name: Model-1
** Generated by: Abaqus/CAE 2017
*Preprint, echo=NO, model=NO, history=NO, contact=NO
**
** PARTS
**
*Part, name=Cube
*Node
      1,           8.,           2.,           8.
      2,           8.,           8.,           8.
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*Element, type=C3D8
   1,  174, 1365, 4349, 1123,    1,   65,  881,  108
   2, 1365, 1366, 4350, 4349,   65,   66,  882,  881
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*Nset, nset=Set-1
    1,    2,    3,    4,    5,    6
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*Elset, elset=Set-1
 1729, 1730, 1731, 1732, 1733, 1734
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*Nset, nset=Set-2
    1,    2,    3,    4,    5,    6
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*Elset, elset=Set-2
 4225, 4226, 4227, 4228, 4229, 4230
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*Nset, nset=Set-3
    1,    2,    3,    4,    5,    6
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*Elset, elset=Set-3, generate
    1,  1728,     1
*Nset, nset=Set-4
    1,    2,    3,    4,    5,    6
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*Elset, elset=Set-4, generate
 1729,  8000,     1
** Section: Percipittate
*Solid Section, elset=Set-3, material=Percipitate2
,
** Section: Channel
*Solid Section, elset=Set-4, material=Percipitate2
,
*End Part
**
**
** ASSEMBLY
**
*Assembly, name=Assembly
**
*Instance, name=Cube-1, part=Cube
*End Instance
**
*Nset, nset=Set-1, instance=Cube-1
   17,   19,   20,   22,   23,   24
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*Elset, elset=Set-1, instance=Cube-1
 2497, 2501, 2505, 2509, 2513, 2517
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*Nset, nset=Set-2, instance=Cube-1
   25,   26,   27,   28,   29,   30
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*Elset, elset=Set-2, instance=Cube-1
 3265, 3269, 3273, 3277, 3281, 3285
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*Nset, nset=Set-3, instance=Cube-1
   49,   50,   51,   52,   53,   54
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*Elset, elset=Set-3, instance=Cube-1
 5969, 5970, 5971, 5972, 5973, 5974
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*Nset, nset=Set-4, instance=Cube-1
    9,   10,   11,   12,   14,   16
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*Elset, elset=Set-4, instance=Cube-1
 1729, 1733, 1737, 1741, 1745, 1749
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*End Assembly
*Amplitude, name=Amp-1, time=TOTAL TIME
             0.,              0.,             20.,             -3.
*Amplitude, name=Amp-2, time=TOTAL TIME, definition=SMOOTH STEP
             0.,              0.,             20.,              3.
**
** MATERIALS
**
*Material, name=Channel
*Density
 1e-21,
*Depvar
    800,
*User Material, constants=79
 0.995114,  0.0959854,  0.0231094,   0.096011,    0.99538,         0.,  0.0230026, 0.00221876
   0.999733,    0.00501,    0.00501,    0.00501,    0.00501,    0.00501,    0.00501,    0.00501
    0.00501,    0.00501,    0.00501,    0.00501,    0.00501,    0.00501,    0.00501,    0.00501
    0.00501,    0.00501,    0.00501,    296000.,    296000.,    296000.,    127000.,    127000.
    127000.,    199000.,    199000.,         0.,         0.,         0.,    199000.,         0.
         0.,         0.,         0.,         0.,         0.,         0.,         0.,         0.
         0.,     0.0528,       126.,       6.68,       7.79,    0.00083,   1.56e-07,    0.00418
         0.,         0.,   1.56e-07,        0.3,        0.5,        0.2,      0.301,         0.
         0.,   4.14e-09,     0.0702,        0.5,   0.000249,       4.02,       1.98,        10.
         0.,        0.3,         1.,    296000.,    199000.,    127000.,    0.00501
*Material, name=Channel2
*Density
 1e-21,
*Depvar
    800,
*User Material, constants=79
1.,       0.,       0.,       0.,       1.,       0.,       0.,       0.
       1.,  0.00501,  0.00501,  0.00501,  0.00501,  0.00501,  0.00501,  0.00501
  0.00501,  0.00501,  0.00501,  0.00501,  0.00501,  0.00501,  0.00501,  0.00501
  0.00501,  0.00501,  0.00501,  296000.,  296000.,  296000.,  127000.,  127000.
  127000.,  199000.,  199000.,       0.,       0.,       0.,  199000.,       0.
       0.,       0.,       0.,       0.,       0.,       0.,       0.,       0.
       0.,   0.0528,     126.,     6.68,     7.79,  0.00083, 1.56e-07,  0.00418
       0.,       0., 1.56e-07,      0.3,      0.5,      0.2,    0.301,       0.
       0., 4.14e-09,   0.0702,      0.5, 0.000249,     4.02,     1.98,      10.
       0.,      0.3,       1.,  296000.,  199000.,  127000.,  0.00501
*Material, name=Percipitate
*Density
 1e-21,
*Depvar
    800,
*User Material, constants=79
 0.995114,  0.0959854,  0.0231094,   0.096011,    0.99538,         0.,  0.0230026, 0.00221876
   0.999733,    0.00501,    0.00501,    0.00501,    0.00501,    0.00501,    0.00501,    0.00501
    0.00501,    0.00501,    0.00501,    0.00501,    0.00501,    0.00501,    0.00501,    0.00501
    0.00501,    0.00501,    0.00501,    296000.,    296000.,    296000.,    127000.,    127000.
    127000.,    199000.,    199000.,         0.,         0.,         0.,    199000.,         0.
         0.,         0.,         0.,         0.,         0.,         0.,         0.,         0.
         0.,     0.0528,       126.,       6.68,       7.79,    0.00083,   1.56e-07,    0.00418
       1.56,       330.,   1.56e-07,        0.3,        0.5,        0.2,      0.301,     0.0596
      5000.,   4.14e-09,     0.0702,        0.5,   0.000249,       4.02,       1.98,        10.
         0.,        0.3,         1.,    296000.,    199000.,    127000.,    0.00501
*Material, name=Percipitate2
*Density
 1e-21,
*Depvar
    800,
*User Material, constants=79
1.,       0.,       0.,       0.,       1.,       0.,       0.,       0.
       1.,  0.00501,  0.00501,  0.00501,  0.00501,  0.00501,  0.00501,  0.00501
  0.00501,  0.00501,  0.00501,  0.00501,  0.00501,  0.00501,  0.00501,  0.00501
  0.00501,  0.00501,  0.00501,  296000.,  296000.,  296000.,  127000.,  127000.
  127000.,  199000.,  199000.,       0.,       0.,       0.,  199000.,       0.
       0.,       0.,       0.,       0.,       0.,       0.,       0.,       0.
       0.,   0.0528,     126.,     6.68,     7.79,  0.00083, 1.56e-07,  0.00418
     1.56,     330., 1.56e-07,      0.3,      0.5,      0.2,    0.301,   0.0596
    5000., 4.14e-09,   0.0702,      0.5, 0.000249,     4.02,     1.98,      10.
       0.,      0.3,       1.,  296000.,  199000.,  127000.,  0.00501
** ----------------------------------------------------------------
**
** STEP: Step-1
**
*Step, name=Step-1, nlgeom=YES, inc=10000
*Static
0.01, 10., 1e-07, 0.1
**
** BOUNDARY CONDITIONS
**
** Name: BC-1 Type: Displacement/Rotation
*Boundary
Set-1, 1, 1
** Name: BC-2 Type: Displacement/Rotation
*Boundary
Set-2, 2, 2
** Name: BC-3 Type: Displacement/Rotation
*Boundary
Set-3, 3, 3
** Name: BC-4 Type: Displacement/Rotation
*Boundary, amplitude=Amp-2
Set-4, 1, 1, -1.
**
** OUTPUT REQUESTS
**
*Restart, write, overlay, frequency=10
**
** FIELD OUTPUT: F-Output-1
**
*Output, field
*Node Output
CF, RF, U
*Element Output, directions=YES
LE, PE, PEEQ, PEMAG, S, SDV
*Contact Output
CDISP, CSTRESS
**
** HISTORY OUTPUT: H-Output-1
**
*Output, history, variable=PRESELECT
*End Step
